// COMSOL Multiphysics 5.5.0.359 model "rus_srtio3_cube.mph"
// Outline of the model tree

Parameters
  c11 = 321.49167 [GPa]
  c23 = 103.52989 [GPa]
  c44 = 124.91915 [GPa]
  rho = 5.110 [g/cm^3]
  nb_freq = 20

Common definitions
  mpf1: ParticipationFactors

Geometry
  geom1 "Geometry 1" (3D, length unit m)
    blk1: Block | size = {0.145e-2, 0.201e-2, 0.302e-2}
    fin: Finalize "Form Union"

Materials
  mat1: Common "SrTiO3 [solid]" on all domains
    def "Basic"
      thermalexpansioncoefficient = (alpha(T[1/K])[1/K]+(Tempref-293[K])*if(abs(T-Tempref)>1e-3,(alpha(T[1/K])[1/K]-alpha(Tempref[1/K])[1/K])/(T-Tempref),d(alpha(T[1/K])[1/K],T)))/(1+alpha(Tempref[1/K])[1/K]*(Tempref-293[K]))
      density = rho(T[1/K])[kg/m^3]
      alpha: Piecewise | arg = T; pieces = {73.0, 2273.0, 8.850642E-6+1.983639E-9*T^1}
      rho: Piecewise | arg = T; pieces = {73.0, 2273.0, 5160.686-0.1316932*T^1-2.490694E-5*T^2}
    ThermalExpansion
      dL = (dL(T[1/K])-dL(Tempref[1/K]))/(1+dL(Tempref[1/K]))
      dLIso = (dL(T[1/K])-dL(Tempref[1/K]))/(1+dL(Tempref[1/K]))
      dL: Piecewise | arg = T; pieces = {73.0, 2273.0, -0.00259323817+8.269436E-6*T^1+1.983639E-9*T^2}

Physics
  solid: SolidMechanics on all domains
    dependent variable u = {u, v, w}
    lemm1: LinearElasticModel "Linear Elastic Material 1" (default)
      SolidModel = Anisotropic
      D_mat = userdef
      D = {c11, c23, c23, 0, 0, 0, c23, c11, c23, 0, 0, 0, c23, c23, c11, 0, 0, 0, 0, 0, 0, c44, 0, 0, 0, 0, 0, 0, c44, 0, 0, 0, 0, 0, 0, c44}
      rho_mat = userdef
      rho = rho
    free1: Free (default)
    init1: init "Initial Values 1" (default)

Mesh
  mesh1 "Mesh 1" (physics-controlled)

Studies
  std1 "resonances"
    eig: Eigenfrequency | neigs = nb_freq; eigunit = MHz; shift = 1[MHz]

Solver configurations
  sol1 "Solution 1" (study std1)
    v1: Variables "Dependent Variables 1"
    e1: Eigenvalue "Eigenvalue Solver 1"
      transform = eigenfrequency
      neigs = nb_freq
      shift = 1[MHz]
      eigvfunscale = maximum
      eigvfunscaleparam = 3.91E-9
      dDef: Direct

Datasets
  dset1: Solution | solution = sol1

Evaluation groups
  std1EvgFrq: EvaluationGroup "Eigenfrequencies (Study 1)" | data = dset1
    gev1: EvalGlobal "Global Evaluation 1"
      expr = {freq*2*pi, imag(freq)/abs(freq), abs(freq)/imag(freq)/2}
      unit = {rad/s, 1, 1}
      descr = {Angular frequency, Damping ratio, Quality factor}
  std1mpf1: EvaluationGroup "Participation Factors (Study 1)" | data = dset1
    gev1: EvalGlobal "Global Evaluation 1"
      expr = {mpf1.pfLnormX, mpf1.pfLnormY, mpf1.pfLnormZ, mpf1.pfRnormX, mpf1.pfRnormY, mpf1.pfRnormZ, mpf1.mEffLX, mpf1.mEffLY, mpf1.mEffLZ, mpf1.mEffRX, mpf1.mEffRY, mpf1.mEffRZ}
      unit = {1, 1, 1, 1, 1, 1, kg, kg, kg, kg*m^2, kg*m^2, kg*m^2}
      descr = {"Participation factor, normalized, X-translation", "Participation factor, normalized, Y-translation", "Participation factor, normalized, Z-translation", "Participation factor, normalized, X-rotation", "Participation factor, normalized, Y-rotation", "Participation factor, normalized, Z-rotation", "Effective modal mass, X-translation", "Effective modal mass, Y-translation", "Effective modal mass, Z-translation", "Effective modal mass, X-rotation", "Effective modal mass, Y-rotation", "Effective modal mass, Z-rotation"}

Plots
  pg1: PlotGroup3D "Mode Shape (solid)" | data = dset1
    surf1: Surface | expr = solid.disp
      def: Deform "Deformation" | expr = {u, v, w}